# 2. Выбор электродвигателя и кинематический расчёт привода
# Исходные данные:
F_t := 3.2
n_вых := 150
# Ресурс привода
L_n := 12000  # часов
# 2.1. Выбор электродвигателя
η_кп := 0.97  # - КПД конической передачи с круговым зубом
η_окп := 0.96  # - КПД конической передачи с прямым зубом
η_п := 0.995  # - КПД пары подшипников качения
η_рп := 0.96  # - КПД зубчатоременной передачи
n_вых := 150  # мин^-1  # частота вращения выходного вала
P_вых := 3.5  # кВт  # мощность на выходном валу привода
η_общ := η_рп*η_окп*η_кп*η_п^3 = 0.88061
η_общ := 0.96*0.96*0.97*0.995^3 = 0.88061  # КПД привода
P_потр := P_вых/η_общ = 3.97452  # потребляемая мощность электродвигателя
i_окп1 := 2
i_кп1 := 2.8
i_рп1 := 1.7
i_общ1 := i_окп1*i_кп1*i_рп1 = 9.52
Выбираем
n := 1430  # мин^-1
P := 4  # кВт
i_общ := n/n_вых = 9.53333
i_кп := 2.8
i_окп := 2
i_рп := i_общ/(i_кп*i_окп) = 1.70238
u := 1.702
# 1. Мощности на валах привода
P_1 := 3.9745
P_2 := P_1*η_рп*η_п = 3.79644
P_3 := P_2*η_кп*η_п = 3.66414
P_4 := P_3*η_п*η_окп = 3.49998
# 2. Частоты вращения валов
n_1 := 1430
n_2 := n_1/i_рп = 840
n_3 := n_2/i_кп = 300
n_4 := n_3/i_окп = 150
# 3. Вращающие моменты на валах привода
T_1 := 9550*P_1/n_1 = 26.543
T_2 := 9550*P_2/n_2 = 43.1619
T_3 := 9550*P_3/n_3 = 116.642
T_4 := 9550*P_4/n_4 = 222.832
# Расчет зубчато-ременной открытой передачи
# Определяем расчетную мощность
P_p := P_1*C_p
# где 𝐶𝑃 – коэффициент, зависящий от типа приводимой рабочей машины, количества смен работы, величины перегрузки.
C_p := 1.7
P_p := P_1*C_p = 6.75665
# Рассчитываем модуль передачи по формуле:
m := 35*nthroot(P_1/n_1, 3) = 4.92096  # мм
# Округляем до ближайшего значения из стандартного ряда:
m := 5
# Число зубьев меньшего шкива определяется по табл. 8.2 (стр.101)
z_1 := 18
# Число зубьев большего шкива:
z_2 := z_1*u = 30.636
# Округляем до целого числа и уточняем фактическое передаточное число
z_2 := 31
u_ф := z_2/z_1 = 1.72222
Δu := |u_ф - u|/u*100 = 1.18814  # ∆𝑢≤3% – условие выполняется.
# Диаметры делительных окружностей шкивов:
d_1 := m*z_1 = 90  # мм
d_2 := m*z_2 = 155  # мм
# Окружная скорость ремня рассчитывается по формуле:
v := π*d_1*n_1/(1000*60) = 6.73872  # м/c
# Расчетная окружная сила, передаваемая ремнем:
F_t := 1000*P_p/v = 1002.66  # H
# Число зубьев ремня, находящихся в зацеплении с малым шкивом
z_0 := z_1*α_1/360
# где α_1 угол охвата шкива ремнем;
α_1 := 180 - (57*d_2 - d_1)/a
# а – межосевое расстояние, которое, если не задано, выбирается из рекомендуемого промежутка:
a_min := 0.5*(d_1 + d_2) + 2*m = 132.5
a_max := 2*(d_1 + d_2) = 490
# Выбираем
a := 200  # мм
α_1 := 180 - (57*d_2 - d_1)/a = 136.275
z_0 := z_1*α_1/360 = 6.81375  # z_0≥6 – условие выполняется
# Удельная окружная сила, передаваемая ремнем:
F_ty := F_0*C_u*C_z*C_H
# где F_0– допускаемая удельная окружная сила, передаваемая ремнем шириной 1 мм; определяется по табл. 8.3 (стр.103)
F_0 := 30  # H
# Cu – коэффициент, учитывающий передаточное отношение (вводится только для ускоряющих передач)
C_u := 1
# Сz – коэффициент, учитывающий число зубьев ремня, находящихся в зацеплении с меньшим шкивом; при 𝑧0≥6 Cz = 1, при 𝑧0<6 Cz=1−0.2∙(6−𝑧0);
C_z := 1
# Сн – коэффициент, учитывающий применение натяжного ролика; при одном ролике внутри контура передачи Сн = 0.9, при двух – Сн = 0.8; при наличии ролика снаружи контура передачи – Сн = 0.7.
C_H := 1
F_ty := F_0*C_u*C_z*C_H = 30  # H
# Ширина ремня:
b' := F_t/(F_ty - q*v^2)
# где q – масса 1 м ремня шириной 1 мм, определяется по таблице 8.4 (стр. 104)
q := 7*10^-3
b' := F_t/(F_ty - q*v^2) = 33.78  # мм
# Ширина ремня b с учетом коэффициента Сш (выбираем по табл. 8.5, стр. 104)
C_ш := 1.05
b := b'/C_ш = 32.1714  # мм
# Полученное значение округляется до стандартного (больше расчетного) из табл. 8.6 (стр. 105). Принимаем
b := 32  # вообще в большую сторону надо
# Следует проверить условие b < d1
d_1 = 90
b = 32  # условие выполняется
# Ширина шкива без бортов
B := b + m = 37  # мм
# Диаметры вершин зубьев шкивов
d_a1 := d_1 - 2*δ + K_1
d_a2 := d_2 - 2*δ + K_2
# где 𝛿 – расстояние от впадины зуба до средней линии несущего слоя ремня по ОСТ 3805114–76: для m = 5,0; 7,0; 10,0 мм:
δ := 0.8
# K1 и K2 – поправки, учитывающие нагрузку и податливость витков металлокорда, мм:
K_1 := 0.2*F_t/b*λ*z_1
K_2 := 0.2*F_t/b*λ*z_2
# где 𝜆 – податливость витков металлокорда ремня; определяется по табл. 8.7 (стр. 106).
λ := 8*10^-4  # мм^2/H
K_1 := 0.2*F_t/b*λ*z_1 = 0.0902395
K_2 := 0.2*F_t/b*λ*z_2 = 0.155413
d_a1 := d_1 - 2*δ + K_1 = 88.4902
d_a2 := d_2 - 2*δ + K_2 = 153.555
# Длина ремня расчетная:
L_p := 2*a + π/2*(d_2 + d_1) + (d_2 - d_1)/(4*a) = 784.926
# Стандартную длину ремня можно определить, зная число зубьев и шаг ремня р, которые указаны в ОСТ 3805114–76 (табл. 8.8 и 8.9(стр. 108))
p := 15.71
# Число зубьев ремня должно быть целым. Расчетное число зубьев z_p = L_p/𝑝 округляется в большую сторону по стандарту до z_p.
z_p := L_p/p = 49.9635
z_p := 50
L_p := z_p*p = 785.5
# Межосевое расстояние при принятой длине ремня:
a := 1/4*(L_p - π/2*(d_2 + d_1)) + 1/4*sqrt((L_p - π/2*(d_2 + d_1))^2 - 2*(d_2 - d_1)) = 200.287
# Сила, действующая на валы передачи:
F_n := 1000*P_1/v = 589.801  # H
